# Solenoid
# 0,0 - node 513
x_1 := 0.097561
y_1 := 0.413
z_1 := 0.0
A := [x_1; y_1; z_1] = [0.097561; 0.413; 0]
# 1,0 - node 3242
x_2 := 0.0
y_2 := 0.413
z_2 := 0.0
B := [x_2; y_2; z_2] = [0; 0.413; 0]
# 0,1 - node 3329
x_3 := 0.097561
y_3 := 0.392786
z_3 := 0.127624
C := [x_3; y_3; z_3] = [0.097561; 0.392786; 0.127624]
# 1,1 - node 3347
x_4 := 0.0
y_4 := 0.392786
z_4 := 0.127624
D := [x_4; y_4; z_4] = [0; 0.392786; 0.127624]
1*(B + D)/2/|(B + D)/2| = [0; 0.987688; 0.156435]
x_3/2 = 0.0487805
