# Yoke perpendicular
# 0,0 - node 12079
x_1 := 0.0
y_1 := 0.0
z_1 := 0.5
A := [x_1; y_1; z_1] = [0; 0; 0.5]
# 1,0 - node 80711
x_2 := 0.097545
y_2 := 0.0
z_2 := 0.490393
B := [x_2; y_2; z_2] = [0.097545; 0; 0.490393]
# 0,1 - node 80364
x_3 := 0.0
y_3 := 0.1
z_3 := 0.5
C := [x_3; y_3; z_3] = [0; 0.1; 0.5]
# 1,1
x_4 := 0.097545
y_4 := 0.1
z_4 := 0.490393
D := [x_4; y_4; z_4] = [0.097545; 0.1; 0.490393]
(A + B)/2/|(A + B)/2| = [0.0980169; 0; 0.995185]
# Yoke parallel
# 0,0 - node 11968
x_1 := 0.5
y_1 := 0.0
z_1 := 0.0
A := [x_1; y_1; z_1] = [0.5; 0; 0]
# 1,0 - node 80438
x_2 := 0.490393
y_2 := 0.0
z_2 := 0.097545
B := [x_2; y_2; z_2] = [0.490393; 0; 0.097545]
# 0,1 - node 80145
x_3 := 0.5
y_3 := 0.1
z_3 := 0.0
C := [x_3; y_3; z_3] = [0.5; 0.1; 0]
# 1,1 - node 80761
x_4 := 0.490393
y_4 := 0.1
z_4 := 0.097545
D := [x_4; y_4; z_4] = [0.490393; 0.1; 0.097545]
(A + B)/2/|(A + B)/2| = [0.995185; 0; 0.0980169]
